// SBML level 2 version 4

model SBTAB_Viswan_2018()

  // Compartments:
  compartment Cell = 1e-15 liter;

  // Species:
  species PKC_Ca in Cell = 0;
  species PKC_DAG_AA_p in Cell = 0;
  species PKC_Ca_AA_p in Cell = 0;
  species PKC_Ca_memb_p in Cell = 0;
  species PKC_DAG_memb_p in Cell = 0;
  species PKC_basal_p in Cell = 0.02;
  species PKC_AA_p in Cell = 0;
  species PKC_Ca_DAG in Cell = 0;
  species PKC_DAG in Cell = 0;
  species PKC_DAG_AA in Cell = 0;
  species PKC_cytosolic in Cell = 1;
  species PLA2_cytosolic in Cell = 0.4;
  species PLA2_Ca_p in Cell = 0;
  species PIP2_PLA2_p in Cell = 0;
  species PIP2_Ca_PLA2_p in Cell = 0;
  species DAG_Ca_PLA2_p in Cell = 0;
  species $APC in Cell = 30.00079;
  species PLA2_p_Ca in Cell = 0;
  species PLA2_p in Cell = 0;
  species Arachidonic_Acid in Cell = 0;
  species PLC in Cell = 0.8;
  species $Inositol in Cell = 0;
  species PLC_Ca in Cell = 0;
  species PLC_Ca_Gq in Cell = 0;
  species PLC_Gq in Cell = 0;
  species $PC in Cell = 0;
  species DAG in Cell = 0;
  species IP3 in Cell = 0.730003957;
  species $PIP2 in Cell = 7;
  species MAPK_p_p in Cell = 0;
  species craf_1 in Cell = 0.2;
  species craf_1_p in Cell = 0;
  species MAPKK in Cell = 0.180007915;
  species MAPK in Cell = 0.36;
  species craf_1_p_p in Cell = 0;
  species MAPK_p in Cell = 0;
  species MAPKK_p_p in Cell = 0;
  species MAPKK_p in Cell = 0;
  species Raf_p_GTP_Ras in Cell = 0;
  species craf_1_p_ser259 in Cell = 0;
  species inact_GEF in Cell = 0.1;
  species GEF_p in Cell = 0;
  species GTP_Ras in Cell = 0;
  species GDP_Ras in Cell = 0.5;
  species GAP_p in Cell = 0;
  species GAP in Cell = 0.02;
  species inact_GEF_p in Cell = 0;
  species CaM_GEF in Cell = 0;
  species EGFR in Cell = 0.166664028;
  species L_EGFR in Cell = 0;
  species $EGF in Cell = 0;
  species Internal_L_EGFR in Cell = 0;
  species SHC_p_Sos_Grb2 in Cell = 0;
  species SHC in Cell = 0.500007915;
  species SHC_p in Cell = 0;
  species Sos_p_Grb2 in Cell = 0;
  species Grb2 in Cell = 1;
  species Sos_Grb2 in Cell = 0;
  species Sos_p in Cell = 0;
  species Sos in Cell = 0.1;
  species SHC_p_Grb2_clx in Cell = 0;
  species PLC_g in Cell = 0.820007915;
  species PLC_g_p in Cell = 0;
  species Ca_PLC_g in Cell = 0;
  species Ca_PLC_g_p in Cell = 0;
  species PLCg_basal in Cell = 0.000700024;
  species MKP_1 in Cell = 0.02;
  species PPhosphatase2A in Cell = 0.260007915;
  species $Ca in Cell = 0.08;
  species PKC_act_raf_cplx in Cell = 0;
  species PKC_inact_GAP_cplx in Cell = 0;
  species PKC_act_GEF_cplx in Cell = 0;
  species kenz_cplx in Cell = 0;
  species kenz_cplx_1 in Cell = 0;
  species kenz_cplx_2 in Cell = 0;
  species kenz_cplx_3 in Cell = 0;
  species kenz_cplx_4 in Cell = 0;
  species PLC_Ca_cplx in Cell = 0;
  species PLCb_Ca_Gq_cplx in Cell = 0;
  species MAPK_p_p_cplx in Cell = 0;
  species MAPK_p_p_feedback_cplx in Cell = 0;
  species phosph_Sos_cplx in Cell = 0;
  species MAPKKtyr_cplx in Cell = 0;
  species MAPKKthr_cplx in Cell = 0;
  species Raf_p_GTP_Ras_1_cplx in Cell = 0;
  species Raf_p_GTP_Ras_2_cplx in Cell = 0;
  species basal_GEF_activity_cplx in Cell = 0;
  species GEF_p_act_Ras_cplx in Cell = 0;
  species GAP_inact_Ras_cplx in Cell = 0;
  species CaM_GEF_act_Ras_cplx in Cell = 0;
  species Ca_PLC_g_phospho_cplx in Cell = 0;
  species SHC_phospho_cplx in Cell = 0;
  species Sos_Ras_GEF_cplx in Cell = 0;
  species PLC_g_phospho_cplx in Cell = 0;
  species MKP1_tyr_deph_cplx in Cell = 0;
  species MKP1_thr_deph_cplx in Cell = 0;
  species craf_dephospho_cplx in Cell = 0;
  species MAPKK_dephospho_cplx in Cell = 0;
  species MAPKK_dephospho_ser_cplx in Cell = 0;
  species craf_p_p_dephospho_cplx in Cell = 0;
  species deph_raf_ser259_cplx in Cell = 0;
  species PIP2_Ca_PLC_g in Cell = 0;
  species PIP2_Ca_PLC_g_p in Cell = 0;
  species ERK1_2_ratio1 in Cell = 0;
  species PKC_active in Cell = 0;
  species $None in Cell = 0;
  species $PKC_active_2 in Cell;
  species $pERK1_2_ratio1 in Cell;
  species $pERK1_2_ratio2 in Cell;

  // Parameters:
  kf_R1 = 0.5999982 liter_per_micromole_second;
  kr_R1 = 0.5 one_over_second;
  kf_R2 = 0.00799985 liter_per_micromole_second;
  kr_R2 = 8.6348 one_over_second;
  kf_R3 = 1.2705 one_over_second;
  kr_R3 = 3.5026 one_over_second;
  kf_R4 = 1 one_over_second;
  kr_R4 = 0.1 one_over_second;
  kf_R5 = 0.001200009 liter_per_micromole_second;
  kr_R5 = 0.1 one_over_second;
  kf_R6 = 2 one_over_second;
  kr_R6 = 0.2 one_over_second;
  kf_R7 = 1 one_over_second;
  kr_R7 = 50 one_over_second;
  kf_R8 = 0.0001200009 liter_per_micromole_second;
  kr_R8 = 0.1 one_over_second;
  kf_R9 = 0.0005999982 liter_per_micromole_second;
  kr_R9 = 0.1 one_over_second;
  kf_R10 = 0.01799982 liter_per_micromole_second;
  kr_R10 = 2 one_over_second;
  kf_R11 = 0.9999971 liter_per_micromole_second;
  kr_R11 = 0.1 one_over_second;
  kf_R12 = 0.002999991 liter_per_micromole_second;
  kr_R12 = 4 one_over_second;
  kf_R13 = 0.4 one_over_second;
  kf_R14 = 5.999982 liter_per_micromole_second;
  kr_R14 = 0.1 one_over_second;
  kf_R15 = 0.17 one_over_second;
  kf_R16 = 2.999991 liter_per_micromole_second;
  kr_R16 = 1 one_over_second;
  kf_R17 = 2.5 one_over_second;
  kf_R18 = 0.15 one_over_second;
  kf_R19 = 29.99991 liter_per_micromole_second;
  kr_R19 = 1 one_over_second;
  kf_R20 = 92.40596 liter_per_micromole_second;
  kr_R20 = 4.972331 one_over_second;
  kf_R21 = 0.100916 one_over_second;
  kf_R22 = 0.0007757111 one_over_second;
  kf_R23 = 0.1062087 one_over_second;
  kf_R24 = 1 one_over_second;
  kf_R25 = 4.2 liter_per_micromole_second;
  kr_R25 = 0.25 one_over_second;
  kf_R26 = 0.002 one_over_second;
  kr_R26 = 0.00033 one_over_second;
  kf_R27 = 0.2 one_over_second;
  kf_R28 = 0.4999796 liter_per_micromole_second;
  kr_R28 = 0.1 one_over_second;
  kf_R29 = 0.02500024 liter_per_micromole_second;
  kr_R29 = 0.0168 one_over_second;
  kf_R30 = 0.001 one_over_second;
  kf_R31 = 0.02500024 liter_per_micromole_second;
  kr_R31 = 0.0168 one_over_second;
  kf_R32 = 0.9999971 liter_per_micromole_second;
  kr_R32 = 1 one_over_second;
  kf_R33 = 179.9982 liter_per_micromole_second;
  kr_R33 = 10 one_over_second;
  kf_R34 = 12.00009 liter_per_micromole_second;
  kr_R34 = 10 one_over_second;
  kf_R35 = 0.05 one_over_second;
  kf_R36 = 0.07 one_over_second;
  kf_R37 = 0.9497839 liter_per_micromole_second;
  kr_R37 = 16 one_over_second;
  kf_R38 = 4 one_over_second;
  kf_R39 = 5.65656 liter_per_micromole_second;
  kr_R39 = 16 one_over_second;
  kf_R40 = 4 one_over_second;
  kf_R41 = 5.65656 liter_per_micromole_second;
  kr_R41 = 16 one_over_second;
  kf_R42 = 4 one_over_second;
  kf_R43 = 1.272726 liter_per_micromole_second;
  kr_R43 = 21.6 one_over_second;
  kf_R44 = 5.4 one_over_second;
  kf_R45 = 2.602017 liter_per_micromole_second;
  kr_R45 = 44.16 one_over_second;
  kf_R46 = 11.04 one_over_second;
  kf_R47 = 8.48484 liter_per_micromole_second;
  kr_R47 = 144 one_over_second;
  kf_R48 = 36 one_over_second;
  kf_R49 = 14.1414 liter_per_micromole_second;
  kr_R49 = 240 one_over_second;
  kf_R50 = 60 one_over_second;
  kf_R51 = 28.2828 liter_per_micromole_second;
  kr_R51 = 480 one_over_second;
  kf_R52 = 120 one_over_second;
  kf_R53 = 2.375755 liter_per_micromole_second;
  kr_R53 = 40 one_over_second;
  kf_R54 = 10 one_over_second;
  kf_R55 = 45.25248 liter_per_micromole_second;
  kr_R55 = 192 one_over_second;
  kf_R56 = 48 one_over_second;
  kf_R57 = 3.676764 liter_per_micromole_second;
  kr_R57 = 80 one_over_second;
  kf_R58 = 20 one_over_second;
  kf_R59 = 0.2147682 liter_per_micromole_second;
  kr_R59 = 393.2783 one_over_second;
  kf_R60 = 6.631931 one_over_second;
  kf_R61 = 18.38382 liter_per_micromole_second;
  kr_R61 = 40 one_over_second;
  kf_R62 = 10 one_over_second;
  kf_R63 = 1.527672 liter_per_micromole_second;
  kr_R63 = 0.07474807 one_over_second;
  kf_R64 = 1.448205 one_over_second;
  kf_R65 = 32.38173 liter_per_micromole_second;
  kr_R65 = 5.525225 one_over_second;
  kf_R66 = 1.455191 one_over_second;
  kf_R67 = 9.14766 liter_per_micromole_second;
  kr_R67 = 0.5639622 one_over_second;
  kf_R68 = 2.572705 one_over_second;
  kf_R69 = 81.56428 liter_per_micromole_second;
  kr_R69 = 0.5016722 one_over_second;
  kf_R70 = 2.961011 one_over_second;
  kf_R71 = 0.09356211 liter_per_micromole_second;
  kr_R71 = 0.01658059 one_over_second;
  kf_R72 = 0.00249977 one_over_second;
  kf_R73 = 0.09109615 liter_per_micromole_second;
  kr_R73 = 0.7636072 one_over_second;
  kf_R74 = 0.00241713 one_over_second;
  kf_R75 = 55.57763 liter_per_micromole_second;
  kr_R75 = 4.001658 one_over_second;
  kf_R76 = 99.81596 one_over_second;
  kf_R77 = 1.866665 liter_per_micromole_second;
  kr_R77 = 0.8 one_over_second;
  kf_R78 = 0.2 one_over_second;
  kf_R79 = 2.82828 liter_per_micromole_second;
  kr_R79 = 0.8 one_over_second;
  kf_R80 = 0.2 one_over_second;
  kf_R81 = 1.131312 liter_per_micromole_second;
  kr_R81 = 0.8 one_over_second;
  kf_R82 = 0.2 one_over_second;
  kf_R83 = 1.866665 liter_per_micromole_second;
  kr_R83 = 0.8 one_over_second;
  kf_R84 = 0.2 one_over_second;
  kf_R85 = 14 liter_per_micromole_second;
  kr_R85 = 97.22148 micromole_per_liter;
  kr_R85a = 9722.148 one_over_second;
  kf_R85a = 100 one_over_second;
  kr_R85b = 100 liter_per_micromole_second;
  kf_R86 = 57 liter_per_micromole_second;
  kr_R86 = 19.79152 micromole_per_liter;
  kr_R86a = 1979.152 one_over_second;
  kf_R86a = 100 one_over_second;
  kr_R86b = 100 liter_per_micromole_second;
  kf_R87 = 7.973115 liter_per_micromole_second;
  kr_R87 = 2 one_over_second;
  kf_R88 = 0.5 one_over_second;
  kf_R89 = 2.714777 liter_per_micromole_second;
  kr_R89 = 16 one_over_second;
  kf_R90 = 4 one_over_second;
  kf_R91 = 2.714777 liter_per_micromole_second;
  kr_R91 = 16 one_over_second;
  kf_R92 = 4 one_over_second;
  kf_R93 = 1.866665 liter_per_micromole_second;
  kr_R93 = 25 one_over_second;
  kf_R94 = 6 one_over_second;
  kf_R95 = 1.866665 liter_per_micromole_second;
  kr_R95 = 25 one_over_second;
  kf_R96 = 6 one_over_second;
  kf_R97 = 1.866665 liter_per_micromole_second;
  kr_R97 = 25 one_over_second;
  kf_R98 = 6 one_over_second;
  kf_R99 = 1.866665 liter_per_micromole_second;
  kr_R99 = 25 one_over_second;
  kf_R100 = 6 one_over_second;
  kf_R101 = 1.806462 liter_per_micromole_second;
  kr_R101 = 24 one_over_second;
  kf_R102 = 6 one_over_second;
  kf_PKC_active = 100 one_over_second;
  kf_ERK1_2 = 100 one_over_second;

  // Assignment rules:
  PKC_active_2 := PKC_DAG_AA_p + PKC_Ca_memb_p + PKC_Ca_AA_p + PKC_DAG_memb_p + PKC_basal_p + PKC_AA_p;
  pERK1_2_ratio1 := MAPK_p + MAPK_p_p;
  pERK1_2_ratio2 := MAPK_p + MAPK_p_p;

  // Reactions:
  ReactionFlux0: $Ca + PKC_cytosolic -> PKC_Ca; (kf_R1*Ca*PKC_cytosolic - kr_R1*PKC_Ca)*Cell;
  ReactionFlux1: DAG + PKC_Ca -> PKC_Ca_DAG; (kf_R2*DAG*PKC_Ca - kr_R2*PKC_Ca_DAG)*Cell;
  ReactionFlux2: PKC_Ca -> PKC_Ca_memb_p; (kf_R3*PKC_Ca - kr_R3*PKC_Ca_memb_p)*Cell;
  ReactionFlux3: PKC_Ca_DAG -> PKC_DAG_memb_p; (kf_R4*PKC_Ca_DAG - kr_R4*PKC_DAG_memb_p)*Cell;
  ReactionFlux4: Arachidonic_Acid + PKC_Ca -> PKC_Ca_AA_p; (kf_R5*Arachidonic_Acid*PKC_Ca - kr_R5*PKC_Ca_AA_p)*Cell;
  ReactionFlux5: PKC_DAG_AA -> PKC_DAG_AA_p; (kf_R6*PKC_DAG_AA - kr_R6*PKC_DAG_AA_p)*Cell;
  ReactionFlux6: PKC_cytosolic -> PKC_basal_p; (kf_R7*PKC_cytosolic - kr_R7*PKC_basal_p)*Cell;
  ReactionFlux7: PKC_cytosolic + Arachidonic_Acid -> PKC_AA_p; (kf_R8*PKC_cytosolic*Arachidonic_Acid - kr_R8*PKC_AA_p)*Cell;
  ReactionFlux8: PKC_cytosolic + DAG -> PKC_DAG; (kf_R9*PKC_cytosolic*DAG - kr_R9*PKC_DAG)*Cell;
  ReactionFlux9: Arachidonic_Acid + PKC_DAG -> PKC_DAG_AA; (kf_R10*Arachidonic_Acid*PKC_DAG - kr_R10*PKC_DAG_AA)*Cell;
  ReactionFlux10: $Ca + PLA2_cytosolic -> PLA2_Ca_p; (kf_R11*Ca*PLA2_cytosolic - kr_R11*PLA2_Ca_p)*Cell;
  ReactionFlux11: PLA2_Ca_p + DAG -> DAG_Ca_PLA2_p; (kf_R12*PLA2_Ca_p*DAG - kr_R12*DAG_Ca_PLA2_p)*Cell;
  ReactionFlux12: Arachidonic_Acid => $APC; kf_R13*Arachidonic_Acid*Cell;
  ReactionFlux13: $Ca + PLA2_p -> PLA2_p_Ca; (kf_R14*Ca*PLA2_p - kr_R14*PLA2_p_Ca)*Cell;
  ReactionFlux14: PLA2_p => PLA2_cytosolic; kf_R15*PLA2_p*Cell;
  ReactionFlux15: PLC + $Ca -> PLC_Ca; (kf_R16*PLC*Ca - kr_R16*PLC_Ca)*Cell;
  ReactionFlux16: IP3 => $Inositol; kf_R17*IP3*Cell;
  ReactionFlux17: DAG => $PC; kf_R18*DAG*Cell;
  ReactionFlux18: PLC_Gq + $Ca -> PLC_Ca_Gq; (kf_R19*PLC_Gq*Ca - kr_R19*PLC_Ca_Gq)*Cell;
  ReactionFlux19: GTP_Ras + craf_1_p -> Raf_p_GTP_Ras; (kf_R20*GTP_Ras*craf_1_p - kr_R20*Raf_p_GTP_Ras)*Cell;
  ReactionFlux20: GEF_p => inact_GEF; kf_R21*GEF_p*Cell;
  ReactionFlux21: GTP_Ras => GDP_Ras; kf_R22*GTP_Ras*Cell;
  ReactionFlux22: GAP_p => GAP; kf_R23*GAP_p*Cell;
  ReactionFlux23: inact_GEF_p => inact_GEF; kf_R24*inact_GEF_p*Cell;
  ReactionFlux24: EGFR + $EGF -> L_EGFR; (kf_R25*EGFR*EGF - kr_R25*L_EGFR)*Cell;
  ReactionFlux25: L_EGFR -> Internal_L_EGFR; (kf_R26*L_EGFR - kr_R26*Internal_L_EGFR)*Cell;
  ReactionFlux26: SHC_p => SHC; kf_R27*SHC_p*Cell;
  ReactionFlux27: Sos_Grb2 + SHC_p -> SHC_p_Sos_Grb2; (kf_R28*Sos_Grb2*SHC_p - kr_R28*SHC_p_Sos_Grb2)*Cell;
  ReactionFlux28: Grb2 + Sos_p -> Sos_p_Grb2; (kf_R29*Grb2*Sos_p - kr_R29*Sos_p_Grb2)*Cell;
  ReactionFlux29: Sos_p => Sos; kf_R30*Sos_p*Cell;
  ReactionFlux30: Grb2 + Sos -> Sos_Grb2; (kf_R31*Grb2*Sos - kr_R31*Sos_Grb2)*Cell;
  ReactionFlux31: Grb2 + SHC_p -> SHC_p_Grb2_clx; (kf_R32*Grb2*SHC_p - kr_R32*SHC_p_Grb2_clx)*Cell;
  ReactionFlux32: $Ca + PLC_g -> Ca_PLC_g; (kf_R33*Ca*PLC_g - kr_R33*Ca_PLC_g)*Cell;
  ReactionFlux33: $Ca + PLC_g_p -> Ca_PLC_g_p; (kf_R34*Ca*PLC_g_p - kr_R34*Ca_PLC_g_p)*Cell;
  ReactionFlux34: Ca_PLC_g_p => Ca_PLC_g; kf_R35*Ca_PLC_g_p*Cell;
  ReactionFlux35: PLC_g_p => PLC_g; kf_R36*PLC_g_p*Cell;
  ReactionFlux36: craf_1 + PKC_active -> PKC_act_raf_cplx; (kf_R37*craf_1*PKC_active - kr_R37*PKC_act_raf_cplx)*Cell;
  ReactionFlux37: PKC_act_raf_cplx => PKC_active + craf_1_p; kf_R38*PKC_act_raf_cplx*Cell;
  ReactionFlux38: GAP + PKC_active -> PKC_inact_GAP_cplx; (kf_R39*GAP*PKC_active - kr_R39*PKC_inact_GAP_cplx)*Cell;
  ReactionFlux39: PKC_inact_GAP_cplx => GAP_p + PKC_active; kf_R40*PKC_inact_GAP_cplx*Cell;
  ReactionFlux40: inact_GEF + PKC_active -> PKC_act_GEF_cplx; (kf_R41*inact_GEF*PKC_active - kr_R41*PKC_act_GEF_cplx)*Cell;
  ReactionFlux41: PKC_act_GEF_cplx => GEF_p + PKC_active; kf_R42*PKC_act_GEF_cplx*Cell;
  ReactionFlux42: PLA2_Ca_p + $APC -> kenz_cplx; (kf_R43*PLA2_Ca_p*APC - kr_R43*kenz_cplx)*Cell;
  ReactionFlux43: kenz_cplx => PLA2_Ca_p + Arachidonic_Acid; kf_R44*kenz_cplx*Cell;
  ReactionFlux44: $APC + PIP2_PLA2_p -> kenz_cplx_1; (kf_R45*APC*PIP2_PLA2_p - kr_R45*kenz_cplx_1)*Cell;
  ReactionFlux45: kenz_cplx_1 => PIP2_PLA2_p + Arachidonic_Acid; kf_R46*kenz_cplx_1*Cell;
  ReactionFlux46: $APC + PIP2_Ca_PLA2_p -> kenz_cplx_2; (kf_R47*APC*PIP2_Ca_PLA2_p - kr_R47*kenz_cplx_2)*Cell;
  ReactionFlux47: kenz_cplx_2 => PIP2_Ca_PLA2_p + Arachidonic_Acid; kf_R48*kenz_cplx_2*Cell;
  ReactionFlux48: $APC + DAG_Ca_PLA2_p -> kenz_cplx_3; (kf_R49*APC*DAG_Ca_PLA2_p - kr_R49*kenz_cplx_3)*Cell;
  ReactionFlux49: kenz_cplx_3 => DAG_Ca_PLA2_p + Arachidonic_Acid; kf_R50*kenz_cplx_3*Cell;
  ReactionFlux50: $APC + PLA2_p_Ca -> kenz_cplx_4; (kf_R51*APC*PLA2_p_Ca - kr_R51*kenz_cplx_4)*Cell;
  ReactionFlux51: kenz_cplx_4 => PLA2_p_Ca + Arachidonic_Acid; kf_R52*kenz_cplx_4*Cell;
  ReactionFlux52: $PIP2 + PLC_Ca -> PLC_Ca_cplx; (kf_R53*PIP2*PLC_Ca - kr_R53*PLC_Ca_cplx)*Cell;
  ReactionFlux53: PLC_Ca_cplx => PLC_Ca + DAG + IP3; kf_R54*PLC_Ca_cplx*Cell;
  ReactionFlux54: $PIP2 + PLC_Ca_Gq -> PLCb_Ca_Gq_cplx; (kf_R55*PIP2*PLC_Ca_Gq - kr_R55*PLCb_Ca_Gq_cplx)*Cell;
  ReactionFlux55: PLCb_Ca_Gq_cplx => DAG + PLC_Ca_Gq + IP3; kf_R56*PLCb_Ca_Gq_cplx*Cell;
  ReactionFlux56: MAPK_p_p + PLA2_cytosolic -> MAPK_p_p_cplx; (kf_R57*MAPK_p_p*PLA2_cytosolic - kr_R57*MAPK_p_p_cplx)*Cell;
  ReactionFlux57: MAPK_p_p_cplx => MAPK_p_p + PLA2_p; kf_R58*MAPK_p_p_cplx*Cell;
  ReactionFlux58: MAPK_p_p + craf_1_p -> MAPK_p_p_feedback_cplx; (kf_R59*MAPK_p_p*craf_1_p - kr_R59*MAPK_p_p_feedback_cplx)*Cell;
  ReactionFlux59: MAPK_p_p_feedback_cplx => MAPK_p_p + craf_1_p_p; kf_R60*MAPK_p_p_feedback_cplx*Cell;
  ReactionFlux60: MAPK_p_p + Sos -> phosph_Sos_cplx; (kf_R61*MAPK_p_p*Sos - kr_R61*phosph_Sos_cplx)*Cell;
  ReactionFlux61: phosph_Sos_cplx => MAPK_p_p + Sos_p; kf_R62*phosph_Sos_cplx*Cell;
  ReactionFlux62: MAPKK_p_p + MAPK -> MAPKKtyr_cplx; (kf_R63*MAPKK_p_p*MAPK - kr_R63*MAPKKtyr_cplx)*Cell;
  ReactionFlux63: MAPKKtyr_cplx => MAPKK_p_p + MAPK_p; kf_R64*MAPKKtyr_cplx*Cell;
  ReactionFlux64: MAPKK_p_p + MAPK_p -> MAPKKthr_cplx; (kf_R65*MAPKK_p_p*MAPK_p - kr_R65*MAPKKthr_cplx)*Cell;
  ReactionFlux65: MAPKKthr_cplx => MAPKK_p_p + MAPK_p_p; kf_R66*MAPKKthr_cplx*Cell;
  ReactionFlux66: MAPKK + Raf_p_GTP_Ras -> Raf_p_GTP_Ras_1_cplx; (kf_R67*MAPKK*Raf_p_GTP_Ras - kr_R67*Raf_p_GTP_Ras_1_cplx)*Cell;
  ReactionFlux67: Raf_p_GTP_Ras_1_cplx => MAPKK_p + Raf_p_GTP_Ras; kf_R68*Raf_p_GTP_Ras_1_cplx*Cell;
  ReactionFlux68: MAPKK_p + Raf_p_GTP_Ras -> Raf_p_GTP_Ras_2_cplx; (kf_R69*MAPKK_p*Raf_p_GTP_Ras - kr_R69*Raf_p_GTP_Ras_2_cplx)*Cell;
  ReactionFlux69: Raf_p_GTP_Ras_2_cplx => MAPKK_p_p + Raf_p_GTP_Ras; kf_R70*Raf_p_GTP_Ras_2_cplx*Cell;
  ReactionFlux70: inact_GEF + GDP_Ras -> basal_GEF_activity_cplx; (kf_R71*inact_GEF*GDP_Ras - kr_R71*basal_GEF_activity_cplx)*Cell;
  ReactionFlux71: basal_GEF_activity_cplx => inact_GEF + GTP_Ras; kf_R72*basal_GEF_activity_cplx*Cell;
  ReactionFlux72: GEF_p + GDP_Ras -> GEF_p_act_Ras_cplx; (kf_R73*GEF_p*GDP_Ras - kr_R73*GEF_p_act_Ras_cplx)*Cell;
  ReactionFlux73: GEF_p_act_Ras_cplx => GEF_p + GTP_Ras; kf_R74*GEF_p_act_Ras_cplx*Cell;
  ReactionFlux74: GAP + GTP_Ras -> GAP_inact_Ras_cplx; (kf_R75*GAP*GTP_Ras - kr_R75*GAP_inact_Ras_cplx)*Cell;
  ReactionFlux75: GAP_inact_Ras_cplx => GAP + GDP_Ras; kf_R76*GAP_inact_Ras_cplx*Cell;
  ReactionFlux76: GDP_Ras + CaM_GEF -> CaM_GEF_act_Ras_cplx; (kf_R77*GDP_Ras*CaM_GEF - kr_R77*CaM_GEF_act_Ras_cplx)*Cell;
  ReactionFlux77: CaM_GEF_act_Ras_cplx => GTP_Ras + CaM_GEF; kf_R78*CaM_GEF_act_Ras_cplx*Cell;
  ReactionFlux78: L_EGFR + Ca_PLC_g -> Ca_PLC_g_phospho_cplx; (kf_R79*L_EGFR*Ca_PLC_g - kr_R79*Ca_PLC_g_phospho_cplx)*Cell;
  ReactionFlux79: Ca_PLC_g_phospho_cplx => Ca_PLC_g_p + L_EGFR; kf_R80*Ca_PLC_g_phospho_cplx*Cell;
  ReactionFlux80: L_EGFR + SHC -> SHC_phospho_cplx; (kf_R81*L_EGFR*SHC - kr_R81*SHC_phospho_cplx)*Cell;
  ReactionFlux81: SHC_phospho_cplx => L_EGFR + SHC_p; kf_R82*SHC_phospho_cplx*Cell;
  ReactionFlux82: SHC_p_Sos_Grb2 + GDP_Ras -> Sos_Ras_GEF_cplx; (kf_R83*SHC_p_Sos_Grb2*GDP_Ras - kr_R83*Sos_Ras_GEF_cplx)*Cell;
  ReactionFlux83: Sos_Ras_GEF_cplx => SHC_p_Sos_Grb2 + GTP_Ras; kf_R84*Sos_Ras_GEF_cplx*Cell;
  ReactionFlux84: $PIP2 + PIP2_Ca_PLC_g => DAG + IP3 + PIP2_Ca_PLC_g; kf_R85*PIP2*PIP2_Ca_PLC_g*Cell;
  ReactionFlux84a: Ca_PLC_g => Ca_PLC_g + PIP2_Ca_PLC_g; kf_R85a*Ca_PLC_g*Cell;
  ReactionFlux84b: $PIP2 + PIP2_Ca_PLC_g => $PIP2; kr_R85b*PIP2*PIP2_Ca_PLC_g*Cell;
  ReactionFlux84c: PIP2_Ca_PLC_g => $None; kr_R85a*PIP2_Ca_PLC_g*Cell;
  ReactionFlux85: $PIP2 + PIP2_Ca_PLC_g_p => DAG + IP3 + PIP2_Ca_PLC_g_p; kf_R86*PIP2*PIP2_Ca_PLC_g_p*Cell;
  ReactionFlux85a: Ca_PLC_g_p => Ca_PLC_g_p + PIP2_Ca_PLC_g_p; kf_R86a*Ca_PLC_g_p*Cell;
  ReactionFlux85b: $PIP2 + PIP2_Ca_PLC_g_p => $PIP2; kr_R86b*PIP2*PIP2_Ca_PLC_g_p*Cell;
  ReactionFlux85c: PIP2_Ca_PLC_g_p => $None; kr_R86a*PIP2_Ca_PLC_g_p*Cell;
  ReactionFlux86: PLCg_basal + PLC_g -> PLC_g_phospho_cplx; (kf_R87*PLCg_basal*PLC_g - kr_R87*PLC_g_phospho_cplx)*Cell;
  ReactionFlux87: PLC_g_phospho_cplx => PLCg_basal + PLC_g_p; kf_R88*PLC_g_phospho_cplx*Cell;
  ReactionFlux88: MKP_1 + MAPK_p -> MKP1_tyr_deph_cplx; (kf_R89*MKP_1*MAPK_p - kr_R89*MKP1_tyr_deph_cplx)*Cell;
  ReactionFlux89: MKP1_tyr_deph_cplx => MAPK + MKP_1; kf_R90*MKP1_tyr_deph_cplx*Cell;
  ReactionFlux90: MAPK_p_p + MKP_1 -> MKP1_thr_deph_cplx; (kf_R91*MAPK_p_p*MKP_1 - kr_R91*MKP1_thr_deph_cplx)*Cell;
  ReactionFlux91: MKP1_thr_deph_cplx => MKP_1 + MAPK_p; kf_R92*MKP1_thr_deph_cplx*Cell;
  ReactionFlux92: craf_1_p + PPhosphatase2A -> craf_dephospho_cplx; (kf_R93*craf_1_p*PPhosphatase2A - kr_R93*craf_dephospho_cplx)*Cell;
  ReactionFlux93: craf_dephospho_cplx => craf_1 + PPhosphatase2A; kf_R94*craf_dephospho_cplx*Cell;
  ReactionFlux94: MAPKK_p_p + PPhosphatase2A -> MAPKK_dephospho_cplx; (kf_R95*MAPKK_p_p*PPhosphatase2A - kr_R95*MAPKK_dephospho_cplx)*Cell;
  ReactionFlux95: MAPKK_dephospho_cplx => MAPKK_p + PPhosphatase2A; kf_R96*MAPKK_dephospho_cplx*Cell;
  ReactionFlux96: MAPKK_p + PPhosphatase2A -> MAPKK_dephospho_ser_cplx; (kf_R97*MAPKK_p*PPhosphatase2A - kr_R97*MAPKK_dephospho_ser_cplx)*Cell;
  ReactionFlux97: MAPKK_dephospho_ser_cplx => MAPKK + PPhosphatase2A; kf_R98*MAPKK_dephospho_ser_cplx*Cell;
  ReactionFlux98: craf_1_p_p + PPhosphatase2A -> craf_p_p_dephospho_cplx; (kf_R99*craf_1_p_p*PPhosphatase2A - kr_R99*craf_p_p_dephospho_cplx)*Cell;
  ReactionFlux99: craf_p_p_dephospho_cplx => PPhosphatase2A + craf_1_p; kf_R100*craf_p_p_dephospho_cplx*Cell;
  ReactionFlux100: craf_1_p_ser259 + PPhosphatase2A -> deph_raf_ser259_cplx; (kf_R101*craf_1_p_ser259*PPhosphatase2A - kr_R101*deph_raf_ser259_cplx)*Cell;
  ReactionFlux101: deph_raf_ser259_cplx => craf_1 + PPhosphatase2A; kf_R102*deph_raf_ser259_cplx*Cell;
  ReactionFlux102: PKC_DAG_AA_p => PKC_DAG_AA_p + PKC_active; kf_PKC_active*PKC_DAG_AA_p*Cell;
  ReactionFlux103: PKC_Ca_memb_p => PKC_Ca_memb_p + PKC_active; kf_PKC_active*PKC_Ca_memb_p*Cell;
  ReactionFlux104: PKC_Ca_AA_p => PKC_Ca_AA_p + PKC_active; kf_PKC_active*PKC_Ca_AA_p*Cell;
  ReactionFlux105: PKC_DAG_memb_p => PKC_DAG_memb_p + PKC_active; kf_PKC_active*PKC_DAG_memb_p*Cell;
  ReactionFlux106: PKC_basal_p => PKC_basal_p + PKC_active; kf_PKC_active*PKC_basal_p*Cell;
  ReactionFlux107: PKC_AA_p => PKC_AA_p + PKC_active; kf_PKC_active*PKC_AA_p*Cell;
  ReactionFlux108: PKC_active => $None; kf_PKC_active*PKC_active*Cell;
  ReactionFlux109: MAPK_p_p => MAPK_p_p + ERK1_2_ratio1; kf_ERK1_2*MAPK_p_p*Cell;
  ReactionFlux110: MAPK_p => MAPK_p + ERK1_2_ratio1; kf_ERK1_2*MAPK_p*Cell;
  ReactionFlux111: ERK1_2_ratio1 => $None; kf_ERK1_2*ERK1_2_ratio1*Cell;

  // Unit definitions:
  unit time = second;
  unit volume = litre;
  unit substance = 1e-6 mole;
  unit length = 1e-6 metre;
  unit area = (1e-6 metre)^2;
  unit micromole_per_litre = 1e-6 mole / litre;
  unit micromole_per_liter = 1e-6 mole / litre;
  unit liter_per_micromole_second = litre / (1e-6 mole * second);
  unit one_over_second = dimensionless / second;
  unit liter = litre;
end
